// SBML level 3 version 2
// Created with https://github.com/matthiaskoenig/sbmlutils.

model captopril_intestine(PODOSE_cap, Ka_dis_cap, Mr_cap, Vext, Vgu, Vlumen, Vfeces, Vstomach, cap_lumen, cap_ext, cap_feces, capss_ext, capss_lumen, capss_feces, captot_feces, capall_feces)
  // Model for captopril and captopril disulfide absorption in the small intestine
  // Model for captopril and captopril ddisulfide absorption
  // The content of this model has been carefully created in a manual research effort.
  // Terms of use
  // Copyright © 2025 Matthias König.
  // This work is licensed under a Creative Commons Attribution 4.0 International License.
  // Redistribution and use of any part of this model, with or without modification, are permitted provided that the following conditions are met:
  // Redistributions of this SBML file must retain the above copyright notice, this list of conditions and the following disclaimer.
  // Redistributions in a different form must reproduce the above copyright notice, this list of conditions and the following disclaimer in the documentation and/or other materials provided with the distribution.
  // This model is distributed in the hope that it will be useful, but WITHOUT ANY WARRANTY; without even the implied warranty of MERCHANTABILITY or FITNESS FOR A PARTICULAR PURPOSE.
  // model units - substance: mmole, time: min, volume: litre, area: m2, length: metre, extent: mmole

  // Compartments:
  compartment Vext = 1 litre; Vext is "plasma";  // SBO:0000290 ncit:C13356 BTO:0000131
  compartment Vgu = 1.2825 litre; Vgu is "intestine";  // SBO:0000290 FMA:45615 BTO:0000545 ncit:C12736
  compartment Vlumen = 1.15425 litre; Vlumen is "intestinal lumen (inner part of intestine)";  // SBO:0000290 FMA:14586 UBERON:0018543
  compartment Vfeces = 1 litre;  // SBO:0000290 FMA:64183 ncit:C13234 BTO:0000440
  compartment Ventero = 1 litre; Ventero is "intestinal lining (enterocytes)";  // SBO:0000290
  compartment Vapical = NaN; Vapical has m2; Vapical is "apical membrane (intestinal membrane enterocytes)";  // SBO:0000290 FMA:84666 GO:0016324
  compartment Vbaso = NaN; Vbaso has m2; Vbaso is "basolateral membrane (intestinal membrane enterocytes)";  // SBO:0000290 FMA:84669 GO:0016323
  compartment Vstomach = 1 litre;  // SBO:0000290 FMA:7148 ncit:C12391 UBERON:0000945
  compartment Vint_0; Vint_0 has litre; Vint_0 is "intestinal lumen (inner part of intestine)";  // SBO:0000290 FMA:14586 UBERON:0018543
  compartment Vint_1; Vint_1 has litre; Vint_1 is "intestinal lumen (inner part of intestine)";  // SBO:0000290 FMA:14586 UBERON:0018543
  compartment Vint_2; Vint_2 has litre; Vint_2 is "intestinal lumen (inner part of intestine)";  // SBO:0000290 FMA:14586 UBERON:0018543
  compartment Vint_3; Vint_3 has litre; Vint_3 is "intestinal lumen (inner part of intestine)";  // SBO:0000290 FMA:14586 UBERON:0018543
  compartment Vint_4; Vint_4 has litre; Vint_4 is "intestinal lumen (inner part of intestine)";  // SBO:0000290 FMA:14586 UBERON:0018543

  // Species:
  substanceOnly species $cap_stomach in Vstomach = 0; cap_stomach is "captopril (stomach)";  // SBO:0000247 CHEBI:3380 ncit:C340 pubchem.compound:44093
  species cap_lumen in Vlumen = 0; cap_lumen is "captopril (intestinal volume)";  // SBO:0000247 CHEBI:3380 ncit:C340 pubchem.compound:44093
  species cap_ext in Vext = 0; cap_ext is "captopril (plasma)";  // SBO:0000247 CHEBI:3380 ncit:C340 pubchem.compound:44093
  substanceOnly species cap_feces in Vfeces = 0; cap_feces is "captopril (feces)";  // SBO:0000247 CHEBI:3380 ncit:C340 pubchem.compound:44093
  species capss_ext in Vext = 0; capss_ext is "captopril disulfide (plasma)";  // SBO:0000247 pubchem.compound:10002934
  species capss_lumen in Vlumen = 0; capss_lumen is "captopril disulfide (intestinal volume)";  // SBO:0000247 pubchem.compound:10002934
  substanceOnly species capss_feces in Vfeces = 0; capss_feces is "captopril disulfide (feces)";  // SBO:0000247 pubchem.compound:10002934
  species cap_int_0 in Vint_0 = 0; cap_int_0 is "cap (intestine) 0";  // SBO:0000247 CHEBI:3380 ncit:C340 pubchem.compound:44093
  species capss_int_0 in Vint_0 = 0; capss_int_0 is "capss (intestine) 0";  // SBO:0000247 CHEBI:3380 ncit:C340 pubchem.compound:44093
  species cap_int_1 in Vint_1 = 0; cap_int_1 is "cap (intestine) 1";  // SBO:0000247 CHEBI:3380 ncit:C340 pubchem.compound:44093
  species capss_int_1 in Vint_1 = 0; capss_int_1 is "capss (intestine) 1";  // SBO:0000247 CHEBI:3380 ncit:C340 pubchem.compound:44093
  species cap_int_2 in Vint_2 = 0; cap_int_2 is "cap (intestine) 2";  // SBO:0000247 CHEBI:3380 ncit:C340 pubchem.compound:44093
  species capss_int_2 in Vint_2 = 0; capss_int_2 is "capss (intestine) 2";  // SBO:0000247 CHEBI:3380 ncit:C340 pubchem.compound:44093
  species cap_int_3 in Vint_3 = 0; cap_int_3 is "cap (intestine) 3";  // SBO:0000247 CHEBI:3380 ncit:C340 pubchem.compound:44093
  species capss_int_3 in Vint_3 = 0; capss_int_3 is "capss (intestine) 3";  // SBO:0000247 CHEBI:3380 ncit:C340 pubchem.compound:44093
  species cap_int_4 in Vint_4 = 0; cap_int_4 is "cap (intestine) 4";  // SBO:0000247 CHEBI:3380 ncit:C340 pubchem.compound:44093
  species capss_int_4 in Vint_4 = 0; capss_int_4 is "capss (intestine) 4";  // SBO:0000247 CHEBI:3380 ncit:C340 pubchem.compound:44093
  substanceOnly species captot_feces in Vfeces; captot_feces is "cap + capss (feces)";  // SBO:0000247
  substanceOnly species capall_feces in Vfeces; capall_feces is "cap + capss + capme (feces)";  // SBO:0000247

  // Parameters:
  // Fraction absorbed, i.e., only a fraction of the captopril in the intestinal lumen is absorbed. This parameter determines how much of the captopril is excreted.
  // F_cap_abs of dose is absorbed. (1-F_cap_abs) is excreted in feces.
  // 'Using radioactive labelled captopril in 3 volunteers 56 +- 6 % of a single dose was recovered in urine and 39 +- 5 % in the feces [6], indicating that almost 60% of the administered dose was absorbed. Absorption could be even higher because a proportion of the drug and its metabolites may also be excreted in the bile.'{Ball1987}
  F_cap_abs = 0.6 dimensionless; F_cap_abs is "fraction absorbed captopril";  // SBO:0000002
  CAPABS_k = 1 per_min; CAPABS_k is "rate of captopril absorption";  // SBO:0000009
  PODOSE_cap = 0 mg; PODOSE_cap is "oral dose captopril [mg]";  // SBO:0000002
  Ka_dis_cap = 2 per_hr; Ka_dis_cap is "Ka_dis [1/hr] dissolution captopril";  // SBO:0000002
  Mr_cap = 217.285 g_per_mole; Mr_cap is "Molecular weight captopril [g/mole]";  // SBO:0000647
  // Identical value as for cap
  F_capss_abs = F_cap_abs; F_capss_abs has dimensionless; F_capss_abs is "fraction absorbed captopril";  // SBO:0000002
  // Identical value as for cap
  CAPSSABS_k = CAPABS_k; CAPSSABS_k has per_min; CAPSSABS_k is "rate of captopril disulfide absorption";  // SBO:0000009
  Vchain = 1 litre; Vchain is "volume of chain compartment";  // SBO:0000009
  CAPEXC_k = 0.0003920629 per_min; CAPEXC_k is "rate of captopril fecal excretion";  // SBO:0000009
  CAPSSEXC_k = CAPEXC_k; CAPSSEXC_k has per_min; CAPSSEXC_k is "rate of captopril disulfide fecal excretion";  // SBO:0000009
  absorption has mmole_per_min; absorption is "absorption captopril";
  absorption_capss has mmole_per_min; absorption_capss is "absorption captopril disulfide";

  // Assignment rules:
  Vint_0 := Vchain;
  Vint_1 := Vchain;
  Vint_2 := Vchain;
  Vint_3 := Vchain;
  Vint_4 := Vchain;
  absorption := CAPABS_k*Vgu*cap_lumen;
  absorption_capss := CAPSSABS_k*Vgu*capss_lumen;
  captot_feces := cap_feces + capss_feces;
  capall_feces := captot_feces;

  // Rate rules:
  PODOSE_cap' = -dissolution_cap*Mr_cap;

  // Reactions:
  CAPABS: cap_lumen => cap_ext; F_cap_abs*absorption; CAPABS is "absorption captopril";  // SBO:0000655
  dissolution_cap: $cap_stomach => cap_lumen; Ka_dis_cap/(60 min_per_hr)*PODOSE_cap/Mr_cap; dissolution_cap is "dissolution captopril";
  CAPSSABS: capss_lumen => capss_ext; F_capss_abs*absorption_capss; CAPSSABS is "absorption captopril disulfide";  // SBO:0000655
  CAPEXC: cap_lumen => cap_int_0; CAPEXC_k*Vgu*cap_lumen; CAPEXC is "excretion captopril (feces)";  // SBO:0000655
  CAPSSEXC: capss_lumen => capss_int_0; CAPSSEXC_k*Vgu*capss_lumen; CAPSSEXC is "excretion captopril disulfide (feces)";  // SBO:0000655
  CAPEXC_0: cap_int_0 => cap_int_1; CAPEXC_k*Vint_0*cap_int_0; CAPEXC_0 is "excretion cap 0";  // SBO:0000655
  CAPSSEXC_0: capss_int_0 => capss_int_1; CAPSSEXC_k*Vint_0*capss_int_0; CAPSSEXC_0 is "excretion capss 0";  // SBO:0000655
  CAPEXC_1: cap_int_1 => cap_int_2; CAPEXC_k*Vint_1*cap_int_1; CAPEXC_1 is "excretion cap 1";  // SBO:0000655
  CAPSSEXC_1: capss_int_1 => capss_int_2; CAPSSEXC_k*Vint_1*capss_int_1; CAPSSEXC_1 is "excretion capss 1";  // SBO:0000655
  CAPEXC_2: cap_int_2 => cap_int_3; CAPEXC_k*Vint_2*cap_int_2; CAPEXC_2 is "excretion cap 2";  // SBO:0000655
  CAPSSEXC_2: capss_int_2 => capss_int_3; CAPSSEXC_k*Vint_2*capss_int_2; CAPSSEXC_2 is "excretion capss 2";  // SBO:0000655
  CAPEXC_3: cap_int_3 => cap_int_4; CAPEXC_k*Vint_3*cap_int_3; CAPEXC_3 is "excretion cap 3";  // SBO:0000655
  CAPSSEXC_3: capss_int_3 => capss_int_4; CAPSSEXC_k*Vint_3*capss_int_3; CAPSSEXC_3 is "excretion capss 3";  // SBO:0000655
  CAPEXC_4: cap_int_4 => cap_feces; CAPEXC_k*Vint_4*cap_int_4; CAPEXC_4 is "excretion cap 4";  // SBO:0000655
  CAPSSEXC_4: capss_int_4 => capss_feces; CAPSSEXC_k*Vint_4*capss_int_4; CAPSSEXC_4 is "excretion capss 4";  // SBO:0000655

  // Unit definitions:
  unit g_per_mole = gram / mole; g_per_mole is "g/mole";
  unit l_per_min = litre / (60 second); l_per_min is "l/min";
  unit m2 = metre^2; m2 is "meter^2";
  unit mM = 1e-3 mole / litre; mM is "mmole/liter";
  unit mg = 1e-3 gram;
  unit mg_per_min = 1e-3 gram / (60 second); mg_per_min is "mg/min";
  unit mg_per_s_l = 1e-3 gram / (second * litre); mg_per_s_l is "mg/s/l";
  unit min = 60 second;
  unit min_per_hr = 60 second / (3600 second); min_per_hr is "min/hour";
  unit mmole = 1e-3 mole;
  unit mmole_per_min = 1e-3 mole / (60 second); mmole_per_min is "mmole/min";
  unit mmole_per_min_l = 1e-3 mole / (60 second * litre); mmole_per_min_l is "mmole/min/l";
  unit nM = 1e-9 mole / litre; nM is "nmole/liter";
  unit per_hr = 1 / (3600 second); per_hr is "1/hr";
  unit per_min = 1 / (60 second); per_min is "1/min";
  unit per_mmole = 1 / (1e-3 mole); per_mmole is "1/mmole";
end
