// SBML level 3 version 2
// Created with https://github.com/matthiaskoenig/sbmlutils.

model captopril_kidney(Vext, Vki, Vurine, cap_ext, cap_urine, capss_ext, capss_urine, capme_ext, capme_urine, captot_urine, capall_urine)
  // Model for renal captopril excretion.
  // Model for captopril excretion. version 1
  // Changelog
  // version 1
  // initial model for demonstration
  // The content of this model has been carefully created in a manual research effort.
  // Terms of use
  // Copyright © 2025 Matthias König.
  // This work is licensed under a Creative Commons Attribution 4.0 International License.
  // Redistribution and use of any part of this model, with or without modification, are permitted provided that the following conditions are met:
  // Redistributions of this SBML file must retain the above copyright notice, this list of conditions and the following disclaimer.
  // Redistributions in a different form must reproduce the above copyright notice, this list of conditions and the following disclaimer in the documentation and/or other materials provided with the distribution.
  // This model is distributed in the hope that it will be useful, but WITHOUT ANY WARRANTY; without even the implied warranty of MERCHANTABILITY or FITNESS FOR A PARTICULAR PURPOSE.
  // model units - substance: mmole, time: min, volume: litre, area: m2, length: metre, extent: mmole

  // Compartments:
  compartment Vext = 1.5 litre; Vext is "plasma";  // SBO:0000290 ncit:C13356 BTO:0000131
  compartment Vki = 0.3 litre; Vki is "kidney";  // SBO:0000290 FMA:7203 BTO:0000671 ncit:C12415
  compartment Vmem = NaN; Vmem has m2; Vmem is "plasma membrane";  // 2-D; SBO:0000290 ncit:C13735 FMA:63841 GO:0005886
  compartment Vurine = 1 litre;  // SBO:0000290 FMA:12274 ncit:C13283 BTO:0001419

  // Species:
  species cap_ext in Vext = 0; cap_ext is "captopril (plasma)";  // SBO:0000247 CHEBI:3380 ncit:C340 pubchem.compound:44093
  substanceOnly species cap_urine in Vurine = 0; cap_urine is "captopril (urine)";  // SBO:0000247 CHEBI:3380 ncit:C340 pubchem.compound:44093
  species capss_ext in Vext = 0; capss_ext is "captopril disulfide (plasma)";  // SBO:0000247 pubchem.compound:10002934
  substanceOnly species capss_urine in Vurine = 0; capss_urine is "captopril disulfide (urine)";  // SBO:0000247 pubchem.compound:10002934
  species capme_ext in Vext = 0; capme_ext is "s-methyl captopril (plasma)";  // SBO:0000247
  substanceOnly species capme_urine in Vurine = 0; capme_urine is "s-methyl captopril (urine)";  // SBO:0000247
  substanceOnly species captot_urine in Vurine; captot_urine is "total captopril (urine)";  // SBO:0000247
  substanceOnly species capall_urine in Vurine; capall_urine is "all captopril (urine)";  // SBO:0000247

  // Parameters:
  f_renal_function = 1 dimensionless; f_renal_function is "parameter for renal function";  // SBO:0000009
  CAPEX_k = 1 per_min; CAPEX_k is "rate urinary excretion of captopril";  // SBO:0000009
  CAPSSEX_k = 0.01 per_min; CAPSSEX_k is "rate urinary excretion of captopril disulfide";  // SBO:0000009
  CAPMEEX_k = 5 per_min; CAPMEEX_k is "rate urinary excretion of s-methyl captopril";  // SBO:0000009

  // Assignment rules:
  captot_urine := cap_urine + capss_urine;
  capall_urine := cap_urine + capss_urine + capme_urine;

  // Reactions:
  // Captopril is excreted via tubular secretion; perhaps handle different than other metabolites.
  CAPEX: cap_ext => cap_urine; f_renal_function*CAPEX_k*Vki*cap_ext; CAPEX is "captopril excretion (CAPEX)";  // SBO:0000655
  CAPSSEX: capss_ext => capss_urine; f_renal_function*CAPSSEX_k*Vki*capss_ext; CAPSSEX is "captopril disulfide excretion (CAPSSEX)";  // SBO:0000655
  CAPMEEX: capme_ext => capme_urine; f_renal_function*CAPMEEX_k*Vki*capme_ext; CAPMEEX is "s-methyl captopril excretion (CAPSSEX)";  // SBO:0000655

  // Unit definitions:
  unit g_per_mole = gram / mole; g_per_mole is "g/mole";
  unit l_per_min = litre / (60 second); l_per_min is "l/min";
  unit m2 = metre^2; m2 is "meter^2";
  unit mM = 1e-3 mole / litre; mM is "mmole/liter";
  unit mg = 1e-3 gram;
  unit mg_per_s_l = 1e-3 gram / (second * litre); mg_per_s_l is "mg/s/l";
  unit min = 60 second;
  unit min_per_hr = 60 second / (3600 second); min_per_hr is "min/hour";
  unit mmole = 1e-3 mole;
  unit mmole_per_min = 1e-3 mole / (60 second); mmole_per_min is "mmole/min";
  unit mmole_per_min_l = 1e-3 mole / (60 second * litre); mmole_per_min_l is "mmole/min/l";
  unit nM = 1e-9 mole / litre; nM is "nmole/liter";
  unit per_min = 1 / (60 second); per_min is "1/min";
  unit per_mmole = 1 / (1e-3 mole); per_mmole is "1/mmole";
end
