// SBML level 3 version 2
// Created with https://github.com/matthiaskoenig/sbmlutils.

model captopril_liver(Vext, Vli, Vbi, Vlumen, capss_ext, capss_lumen)
  // Model for captopril disulfide elimination in the liver
  // enterohepatic circulation of captopril disulfide
  // The content of this model has been carefully created in a manual research effort.
  // Terms of use
  // Copyright © 2025 Matthias König.
  // This work is licensed under a Creative Commons Attribution 4.0 International License.
  // Redistribution and use of any part of this model, with or without modification, are permitted provided that the following conditions are met:
  // Redistributions of this SBML file must retain the above copyright notice, this list of conditions and the following disclaimer.
  // Redistributions in a different form must reproduce the above copyright notice, this list of conditions and the following disclaimer in the documentation and/or other materials provided with the distribution.
  // This model is distributed in the hope that it will be useful, but WITHOUT ANY WARRANTY; without even the implied warranty of MERCHANTABILITY or FITNESS FOR A PARTICULAR PURPOSE.
  // model units - substance: mmole, time: min, volume: litre, area: m2, length: metre, extent: mmole

  // Compartments:
  compartment Vext = 4 litre; Vext is "plasma";  // SBO:0000290 ncit:C13356 BTO:0000131
  compartment Vli = 1.5 litre; Vli is "liver";  // SBO:0000290 FMA:7197 BTO:0000759 ncit:C12392
  compartment Vbaso = NaN; Vbaso has m2; Vbaso is "basolateral membrane";  // SBO:0000290 FMA:84669 GO:0016323
  compartment Vapical = NaN; Vapical has m2; Vapical is "apical membrane";  // SBO:0000290 FMA:84666 GO:0016324
  compartment Vbi = 1 litre; Vbi is "bile";  // SBO:0000290 FMA:62971 ncit:C13192
  compartment Vlumen = 1.15425 litre; Vlumen is "intestinal lumen (inner part of intestine)";  // SBO:0000290 FMA:14586 UBERON:0018543

  // Species:
  species capss_ext in Vext = 0; capss_ext is "captopril disulfide (plasma)";  // SBO:0000247 pubchem.compound:10002934
  species capss in Vli = 0; capss is "captopril disulfide (liver)";  // SBO:0000247 pubchem.compound:10002934
  // Bile captopril disulfide in amount.
  substanceOnly species capss_bi in Vbi = 0; capss_bi is "captopril disulfise (bile)";  // SBO:0000247 pubchem.compound:10002934
  species capss_lumen in Vlumen = 0; capss_lumen is "captopril disulfide (lumen)";  // SBO:0000247 pubchem.compound:10002934

  // Parameters:
  CAPSSEX_k = 0.0001 per_min; CAPSSEX_k is "rate for captopril disulfide export in bile";  // SBO:0000009

  // Reactions:
  CAPSSIM: capss_ext => capss; CAPSSEX_k*Vli*capss_ext; CAPSSIM is "captopril disulfide import";  // SBO:0000655
  CAPSSEX: capss => capss_bi; CAPSSEX_k*Vli*capss; CAPSSEX is "captopril disulfise bile export";  // SBO:0000655
  CAPSSEHC: capss_bi => capss_lumen; CAPSSEX; CAPSSEHC is "captopril disulfide enterohepatic circulation";  // SBO:0000655

  // Unit definitions:
  unit g_per_mole = gram / mole; g_per_mole is "g/mole";
  unit l_per_min = litre / (60 second); l_per_min is "l/min";
  unit m2 = metre^2; m2 is "meter^2";
  unit mM = 1e-3 mole / litre; mM is "mmole/liter";
  unit mg = 1e-3 gram;
  unit mg_per_s_l = 1e-3 gram / (second * litre); mg_per_s_l is "mg/s/l";
  unit min = 60 second;
  unit min_per_hr = 60 second / (3600 second); min_per_hr is "min/hour";
  unit ml_per_min = 1e-3 litre / (60 second); ml_per_min is "ml/min";
  unit mmole = 1e-3 mole;
  unit mmole_per_min = 1e-3 mole / (60 second); mmole_per_min is "mmole/min";
  unit mmole_per_min_l = 1e-3 mole / (60 second * litre); mmole_per_min_l is "mmole/min/l";
  unit nM = 1e-9 mole / litre; nM is "nmole/liter";
  unit per_min = 1 / (60 second); per_min is "1/min";
  unit per_mmole = 1 / (1e-3 mole); per_mmole is "1/mmole";
end
