// SBML level 3 version 2
// Created with https://github.com/matthiaskoenig/sbmlutils.

model captopril_raas(Vplasma, cap)
  // Model for RAAS system of blood pressure regulation.
  // version 2
  // Changelog
  // version 2
  // better handling of baselines and scaling
  // version 1
  // initial model
  // The content of this model has been carefully created in a manual research effort.
  // Terms of use
  // Copyright © 2025 Matthias König.
  // This work is licensed under a Creative Commons Attribution 4.0 International License.
  // Redistribution and use of any part of this model, with or without modification, are permitted provided that the following conditions are met:
  // Redistributions of this SBML file must retain the above copyright notice, this list of conditions and the following disclaimer.
  // Redistributions in a different form must reproduce the above copyright notice, this list of conditions and the following disclaimer in the documentation and/or other materials provided with the distribution.
  // This model is distributed in the hope that it will be useful, but WITHOUT ANY WARRANTY; without even the implied warranty of MERCHANTABILITY or FITNESS FOR A PARTICULAR PURPOSE.
  // model units - substance: mmole, time: min, volume: litre, area: m2, length: metre, extent: mmole

  // Compartments:
  compartment Vplasma = 5 litre;  // SBO:0000290 ncit:C13356 BTO:0000131

  // Species:
  species ald in Vplasma = ald_ref; ald is "aldosterone";  // SBO:0000247 CHEBI:27584 ncit:C219
  species ren in Vplasma = ren_ref; ren is "renin";  // SBO:0000247 uniprot:P00797 ncit:C113591
  species $anggen in Vplasma = anggen_ref; anggen is "angiotensinogen";  // SBO:0000247 CHEBI:2720 ncit:C136723 uniprot:Q3UTR7
  species ang1 in Vplasma = ang1_ref; ang1 is "angiotensin I";  // SBO:0000247 CHEBI:147350 ncit:C248
  species ang2 in Vplasma = ang2_ref; ang2 is "angiotensin II";  // SBO:0000247 CHEBI:58506 ncit:C107562
  species ace in Vplasma = ace_ref; ace is "ACE";  // SBO:0000247 uniprot:P12821
  species cap in Vplasma = 0; cap is "captopril";  // SBO:0000247 CHEBI:3380 ncit:C340 pubchem.compound:44093

  // Parameters:
  // Absolute change to baseline aldosterone
  ald_change has mM; ald_change is "aldosterone change";  // CHEBI:27584 ncit:C219
  // Ratio relative to baseline aldosterone
  ald_ratio has dimensionless; ald_ratio is "aldosterone ratio";  // CHEBI:27584 ncit:C219
  // Absolute change to baseline renin
  ren_change has mM; ren_change is "renin change";  // uniprot:P00797 ncit:C113591
  // Ratio relative to baseline renin
  ren_ratio has dimensionless; ren_ratio is "renin ratio";  // uniprot:P00797 ncit:C113591
  // Absolute change to baseline angiotensin I
  ang1_change has mM; ang1_change is "angiotensin I change";  // CHEBI:147350 ncit:C248
  // Ratio relative to baseline angiotensin I
  ang1_ratio has dimensionless; ang1_ratio is "angiotensin I ratio";  // CHEBI:147350 ncit:C248
  // Absolute change to baseline angiotensin II
  ang2_change has mM; ang2_change is "angiotensin II change";  // CHEBI:58506 ncit:C107562
  // Ratio relative to baseline angiotensin II
  ang2_ratio has dimensionless; ang2_ratio is "angiotensin II ratio";  // CHEBI:58506 ncit:C107562
  // Absolute change to baseline ACE
  ace_change has mM; ace_change is "ACE change";  // uniprot:P12821
  // Ratio relative to baseline ACE
  ace_ratio has dimensionless; ace_ratio is "ACE ratio";  // uniprot:P12821
  anggen_ref = 1e-8 mM; anggen_ref is "reference concentration of angiotensinogen";  // SBO:0000009
  ang1_ref = 1e-8 mM; ang1_ref is "reference concentration of angiotensin I";  // SBO:0000009
  ang2_ref = 8e-9 mM; ang2_ref is "reference concentration of angiotensin II";  // SBO:0000009
  ren_ref = 1e-9 mM; ren_ref is "reference concentration of renin";  // SBO:0000009
  ace_ref = 1e-9 mM; ace_ref is "reference concentration of ACE";  // SBO:0000009
  ald_ref = 2.5e-7 mM; ald_ref is "reference concentration of aldosterone";  // SBO:0000009
  ANG1ANG2_EC50_cap = 3e-9 mM; ANG1ANG2_EC50_cap is "inhibitory constant of captopril";  // SBO:0000261
  // maximum inhibition of ACE activity by captopril is 100%
  ANG1ANG2_Emax_cap = 1 dimensionless; ANG1ANG2_Emax_cap is "inhibitory constant of captopril";  // SBO:0000261
  // ACE activity
  ace_activity has dimensionless; ace_activity is "ACE activity";  // uniprot:P12821
  // ACE inhibition
  ace_inhibition has dimensionless; ace_inhibition is "ACE inhibition";  // uniprot:P12821
  SBP_ref = 120 mmHg; SBP_ref is "reference systolic blood pressure [mmHg]";  // SBO:0000002
  DBP_ref = 80 mmHg; DBP_ref is "reference diastolic blood pressure [mmHg]";  // SBO:0000002
  SBP has mmHg; SBP is "systolic blood pressure [mmHg]";  // SBO:0000002
  DBP has mmHg; DBP is "diastolic blood pressure [mmHg]";  // SBO:0000002
  MAP has mmHg; MAP is "mean arterial pressure [mmHg]";  // SBO:0000002
  BP_ald_fe = 0.3119993 dimensionless; BP_ald_fe is "effect of aldosterone on blood pressure [-]";  // SBO:0000002
  // Absolute change to baseline captopril
  SBP_change has mmHg; SBP_change is "captopril change";
  // Ratio relative to baseline captopril
  SBP_ratio has dimensionless; SBP_ratio is "captopril ratio";
  // Change relative to baseline captopril
  SBP_change_relative has dimensionless; SBP_change_relative is "captopril change relative";
  // Absolute change to baseline captopril
  DBP_change has mmHg; DBP_change is "captopril change";
  // Ratio relative to baseline captopril
  DBP_ratio has dimensionless; DBP_ratio is "captopril ratio";
  // Change relative to baseline captopril
  DBP_change_relative has dimensionless; DBP_change_relative is "captopril change relative";
  // Absolute change to baseline captopril
  MAP_change has mmHg; MAP_change is "captopril change";
  // Ratio relative to baseline captopril
  MAP_ratio has dimensionless; MAP_ratio is "captopril ratio";
  // Change relative to baseline captopril
  MAP_change_relative has dimensionless; MAP_change_relative is "captopril change relative";
  RENSEC_k = 0.1 mmole_per_min; RENSEC_k is "rate renin secretion";  // SBO:0000009
  RENDEG_k has l_per_min; RENDEG_k is "rate renin degradation";  // SBO:0000009
  ACESEC_k = 0.1 mmole_per_min; ACESEC_k is "rate ACE secretion";  // SBO:0000009
  ACEDEG_k has l_per_min; ACEDEG_k is "rate ACE degradation";  // SBO:0000009
  ALDSEC_k = 1.010503e-6 mmole_per_min; ALDSEC_k is "rate aldosterone secretion";  // SBO:0000009
  ALDDEG_k has l_per_min; ALDDEG_k is "rate aldosterone degradation";  // SBO:0000009
  ANGGEN2ANG1_k = 0.1003001 l_per_min; ANGGEN2ANG1_k is "rate angen to ang1 conversion";  // SBO:0000009
  ANG1ANG2_k has l_per_min; ANG1ANG2_k is "rate ang1 to ang2 conversion";  // SBO:0000009
  ANG2DEG_k has l_per_min; ANG2DEG_k is "rate angiotensin II degradation";  // SBO:0000009
  MAP_ref has mmHg;

  // Assignment rules:
  RENDEG_k := RENSEC_k/ren_ref;
  ACEDEG_k := ACESEC_k/ace_ref;
  ALDDEG_k := ALDSEC_k/ald_ref;
  ANG1ANG2_k := ANGGEN2ANG1_k*anggen_ref/ang1_ref;
  ANG2DEG_k := ANGGEN2ANG1_k*anggen_ref/ang2_ref;
  ald_change := ald - ald_ref;
  ald_ratio := ald/ald_ref;
  ren_change := ren - ren_ref;
  ren_ratio := ren/ren_ref;
  ang1_change := ang1 - ang1_ref;
  ang1_ratio := ang1/ang1_ref;
  ang2_change := ang2 - ang2_ref;
  ang2_ratio := ang2/ang2_ref;
  ace_change := ace - ace_ref;
  ace_ratio := ace/ace_ref;
  ace_inhibition := ANG1ANG2_Emax_cap*cap/(cap + ANG1ANG2_EC50_cap);
  ace_activity := 1 - ace_inhibition;
  SBP := SBP_ref + BP_ald_fe*SBP_ref*(ald - ald_ref)/ald_ref;
  DBP := DBP_ref + BP_ald_fe*DBP_ref*(ald - ald_ref)/ald_ref;
  MAP := DBP + (SBP - DBP)/3;
  MAP_ref := DBP_ref + (SBP_ref - DBP_ref)/3;
  SBP_change := SBP - SBP_ref;
  SBP_ratio := SBP/SBP_ref;
  SBP_change_relative := SBP_change/SBP_ref;
  DBP_change := DBP - DBP_ref;
  DBP_ratio := DBP/DBP_ref;
  DBP_change_relative := DBP_change/DBP_ref;
  MAP_change := MAP - MAP_ref;
  MAP_ratio := MAP/MAP_ref;
  MAP_change_relative := MAP_change/MAP_ref;

  // Reactions:
  RENSEC: => ren; RENSEC_k*1/(ang2/ang2_ref); RENSEC is "renin secretion (RENSEC)";  // modifiers: ang2; SBO:0000655
  RENDEG: ren => ; RENDEG_k*ren; RENDEG is "renin degradation (RENDEG)";  // SBO:0000176
  ACESEC: => ace; ACESEC_k; ACESEC is "ACE secretion (ACESEC)";  // SBO:0000655
  ACEDEG: ace => ; ACEDEG_k*ace; ACEDEG is "ACE degradation (ACEDEG)";  // SBO:0000176
  // angiotensin II activates aldosterone secretion by binding to AT1 receptors
  ALDSEC: => ald; ALDSEC_k*ang2/ang2_ref; ALDSEC is "aldosterone secretion (ALDSEC)";  // modifiers: ang2; SBO:0000655
  ALDDEG: ald => ; ALDDEG_k*ald; ALDDEG is "aldosterone degradation (ALDDEG)";  // SBO:0000176
  ANGGEN2ANG1: $anggen => ang1; ANGGEN2ANG1_k*anggen*ren/ren_ref; ANGGEN2ANG1 is "angiotensinogen to angiotensin I (renin)";  // modifiers: ren; SBO:0000176
  ANG1ANG2: ang1 => ang2; ANG1ANG2_k*ang1*ace/ace_ref*ace_activity; ANG1ANG2 is "angiotensin I to angiotensin II (ACE)";  // modifiers: ace, cap; SBO:0000176
  ANG2DEG: ang2 => ; ANG2DEG_k*ang2; ANG2DEG is "angiotensin II degradation (ANG2DEG)";  // SBO:0000176

  // Unit definitions:
  unit g_per_mole = gram / mole; g_per_mole is "g/mole";
  unit l_per_min = litre / (60 second); l_per_min is "l/min";
  unit m2 = metre^2; m2 is "meter^2";
  unit mM = 1e-3 mole / litre; mM is "mmole/liter";
  unit mg = 1e-3 gram;
  unit mg_per_s_l = 1e-3 gram / (second * litre); mg_per_s_l is "mg/s/l";
  unit min = 60 second;
  unit min_per_hr = 60 second / (3600 second); min_per_hr is "min/hour";
  unit mmHg = 133.3224 newton / metre^2; mmHg is "133.32239 N/m^2";
  unit mmole = 1e-3 mole;
  unit mmole_per_min = 1e-3 mole / (60 second); mmole_per_min is "mmole/min";
  unit mmole_per_min_l = 1e-3 mole / (60 second * litre); mmole_per_min_l is "mmole/min/l";
  unit nM = 1e-9 mole / litre; nM is "nmole/liter";
  unit per_min = 1 / (60 second); per_min is "1/min";
  unit per_mmole = 1 / (1e-3 mole); per_mmole is "1/mmole";
end
